<?xml version="1.0"?>

 <aerodynamics>


        <function name="aero/function/kCLge">
            <description>Change_in_lift_due_to_ground_effect</description>
                  <table>
                      <independentVar>aero/h_b-mac-ft</independentVar>
                      <tableData>
                          0.0000  1.2290
                          0.1000  1.2040
                          0.1500  1.1460
                          0.2000  1.1240
                          0.3000  1.1050
                          0.4000  1.0410
                          0.5000  1.0340
                          0.6000  1.0190
                          0.7000  1.0080
                          0.8000  1.0030
                          0.9000  1.0010
                          1.0000  1.0000
                          1.1000  1.0000
                      </tableData>
                  </table>
        </function>

        <function name="aero/function/CA-1">
           <description>Quotient of inlet velocit and air velocity minus one</description>
           <min>
             <sum>
               <quotient>
                 <product>
                   <property>propulsion/engine/n1</property>
                   <value>4</value> <!-- Approx 400 ft/s at max RPM -->
                 </product>
                 <property>velocities/u-aero-fps</property>
               </quotient>
               <value>-1.0</value>
             </sum>
             <value>9</value> <!-- Avoids unrealistic effects at very low speeds  -->
           </min>
         </function>

  <axis name="LIFT">

    <function name="aero/force/Lift_alpha">
      <description>Lift due to alpha</description>
      <product>
          <property>aero/qbarUW-psf</property>
          <property>metrics/Sw-sqft</property>
          <property>aero/function/kCLge</property>
          <table>
            <independentVar lookup="row">aero/alpha-rad</independentVar>
            <tableData>
              -0.35 -0.91
              -0.17 -0.39
               0.00  0.06
               0.17  0.55
               0.44  1.28
               0.61  1.60
               0.79  1.45
               0.91  0.97
               1.04  0.82
               1.40  0.26
               1.80 -0.26
            </tableData>
          </table>
      </product>
    </function>

    <!--function name="aero/force/Lift_speedbrake">
       <description>Delta Lift due to speedbrake</description>
       <product>
           <property>aero/qbar-psf</property>
           <property>metrics/Sw-sqft</property>
           <property>fcs/speedbrake-pos-norm</property>
           <value>0</value>
       </product>
    </function -->

    <function name="aero/force/Lift_elevator">
       <description>Lift due to Elevator Deflection</description>
       <product>
           <property>aero/qbarUW-psf</property>
           <property>metrics/Sw-sqft</property>
           <property>fcs/elevator-pos-rad</property>
           <value>0.40</value>
<!-- From: Aerodynamic analysis of J35 Draken Alexis RIGALDO -->
          <table>
            <independentVar lookup="row">aero/alpha-rad</independentVar>
            <tableData>
              0.0     1.0
              0.24    1.0
              0.35    0.8
              0.5     0.6
              0.7     0.4
              0.85    0.0
              1.0     0.15
              1.3     0.0
              1.7     0.0
            </tableData>
          </table>
       </product>
    </function>

  </axis>

  <axis name="DRAG">

  <function name="aero/function/kCDge">
     <description>Change in drag due to ground effect</description>
     <product>
        <value>1.0</value>
        <table>
           <independentVar> aero/h_b-mac-ft </independentVar>
           <tableData>
              0.0000 0.4800
              0.1000 0.5150
              0.1500 0.6290
              0.2000 0.7090
              0.3000 0.8150
              0.4000 0.8820
              0.5000 0.9280
              0.6000 0.9620
              0.7000 0.9880
              0.8000 1.0000
              0.9000 1.0000
              1.0000 1.0000
              1.1000 1.0000
           </tableData>
        </table>
     </product>
  </function>

    <function name="aero/force/Drag">
       <description>Drag</description>
       <product>
          <property>aero/qbarUW-psf</property>
          <property>metrics/Sw-sqft</property>
          <table>
            <independentVar lookup="row">aero/alpha-rad</independentVar>
            <tableData>
             -1.57    1.50
             -0.35    0.18
             -0.26    0.087
             -0.17    0.032
             -0.09    0.018
             -0.04    0.016
              0.00    0.018
              0.05    0.026
              0.17    0.085
              0.26    0.21
              0.35    0.33
              0.52    0.74
              0.70    1.0
              1.57    1.500
            </tableData>
          </table>
       </product>
    </function>

    <function name="aero/force/Drag_mach">
       <description>Drag due to mach</description>
        <product>
          <property>aero/qbarUW-psf</property>
          <property>metrics/Sw-sqft</property>
          <table>
            <independentVar lookup="row">velocities/mach</independentVar>
            <tableData>
                0.00      0.000
                0.92      0.000
                1.00      0.006
                1.10      0.003
                1.80      0.003
            </tableData>
          </table>
        </product>
    </function>

    <function name="aero/force/Drag_gear">
       <description>Drag due to gear</description>
         <product>
           <property>aero/qbarUW-psf</property>
           <property>gear/gear-pos-norm</property>
           <value>11</value>
         </product>
    </function>

    <function name="aero/force/Drag_speedbrake">
       <description>Drag due to speedbrakes</description>
         <product>
           <property>aero/qbar-psf</property>
           <property>metrics/Sw-sqft</property>
           <property>fcs/speedbrake-pos-norm</property>
           <property>fcs/sp-drag-effect</property>
           <value>0.021</value>
         </product>
    </function>

    <function name="aero/force/Drag_beta">
       <description>Drag due to sideslip</description>
       <product>
          <property>aero/qbarUV-psf</property>
          <property>metrics/Sw-sqft</property>
          <table>
            <independentVar lookup="row">aero/beta-rad</independentVar>
            <tableData>
              -1.57    1.230
              -0.26    0.050
               0.00    0.000
               0.26    0.050
               1.57    1.230
            </tableData>
          </table>
       </product>
    </function>

    <function name="aero/force/Drag_elevator">
       <description>Drag due to Elevator Deflection</description>
       <product>
           <property>aero/qbar-psf</property>
           <property>metrics/Sw-sqft</property>
           <abs><property>fcs/elevator-pos-norm</property></abs>
           <value>0.015</value>
       </product>
    </function>

  <function name="aero/force/Drag_Droptanks">
       <description>Drag due to Droptanks</description>
       <product>
           <property>aero/qbar-psf</property>
           <property>/consumables/droptanks</property>
           <value>0.42</value>
       </product>
    </function>

  </axis>

  <axis name="SIDE">

    <function name="aero/force/Side_beta">
       <description>Side force due to beta</description>
       <product>
           <property>aero/qbar-psf</property>
           <property>metrics/Sw-sqft</property>
          <table>
            <independentVar lookup="row">aero/beta-rad</independentVar>
            <independentVar lookup="column">aero/alpha-rad </independentVar>
            <tableData>
                      -0.50   -0.17    0.0    0.26   0.50   0.70   1.00   1.70
              -1.57    0.50    0.60    0.60   0.60   0.50   0.40   0.30   0.20
              -0.26    0.05    0.15    0.12   0.10   0.13   0.13   0.02   0.02
               0.00    0.00    0.00    0.00   0.00   0.00   0.00   0.00   0.00
               0.26   -0.05   -0.15   -0.12  -0.10  -0.13  -0.13  -0.02  -0.02
               1.57   -0.50   -0.60   -0.60  -0.60  -0.50  -0.40  -0.30  -0.20
            </tableData>
          </table>
       </product>
    </function>

  </axis>

  <axis name="ROLL">

    <function name="aero/moment/Roll_beta">
       <description>Roll moment due to beta</description>
       <product>
           <property>aero/qbarUV-psf</property>
           <property>metrics/Sw-sqft</property>
           <property>metrics/bw-ft</property>
           <property>aero/function/kCLge</property>
           <property>aero/beta-rad</property>
          <table>
            <independentVar lookup="row">aero/alpha-rad</independentVar>
            <tableData>
              -0.17    0.04
               0.00    0.00
               0.08   -0.05
               0.17   -0.08
               0.26   -0.09
               0.42   -0.06
               0.60    0.03
               0.68    0.03
               0.77   -0.08
               1.00   -0.08
            </tableData>
          </table>
       </product>
    </function>

    <function name="aero/moment/Roll_damp">
       <description>Roll moment due to roll rate</description>
       <product>
           <property>aero/qbar-psf</property>
           <property>metrics/Sw-sqft</property>
           <property>metrics/bw-ft</property>
           <property>aero/bi2vel</property>
           <property>velocities/p-aero-rad_sec</property>
           <property>aero/function/kCLge</property>
          <table>
            <independentVar lookup="row">aero/alpha-rad</independentVar>
            <tableData>
              -0.17   -0.15
               0.00   -0.15
               0.17   -0.17
               0.34   -0.20
               0.52   -0.35
               0.69   -0.30
               0.75   -0.15
               0.87   -0.20
               1.00   -0.10
            </tableData>
          </table>
       </product>
    </function>

    <function name="aero/moment/Roll_yaw">
       <description>Roll moment due to yaw rate</description>
       <product>
           <property>aero/qbar-psf</property>
           <property>metrics/Sw-sqft</property>
           <property>metrics/bw-ft</property>
           <property>aero/bi2vel</property>
           <property>velocities/r-aero-rad_sec</property>
          <table>
            <independentVar lookup="row">aero/alpha-rad</independentVar>
            <tableData>
              -0.17   -0.10
               0.00   -0.10
               0.17   -0.10
               0.34   -0.15
               0.52   -0.30
               0.69   -0.40
               0.75   -0.50
               0.87   -0.40
               1.00   -0.25
            </tableData>
          </table>
       </product>
    </function>

    <function name="aero/moment/Roll_aileron">
       <description>Roll moment due to aileron</description>
       <product>
          <property>aero/qbar-psf</property>
          <property>metrics/Sw-sqft</property>
          <property>metrics/bw-ft</property>
          <property>fcs/left-aileron-control</property>
          <table>
            <independentVar lookup="row">velocities/mach</independentVar>
            <tableData>
              0.0     0.11
              0.9     0.11
              1.1     0.07
              2.0     0.07
            </tableData>
          </table>
<!-- Stall lowering of efficency -->
          <table>
            <independentVar lookup="row">aero/alpha-rad</independentVar>
            <tableData>
              0.0     1.0
              0.24    1.0
              0.35    0.6
              0.8     0.15
              2.0     0.1
            </tableData>
          </table>
       </product>
    </function>

    <function name="aero/moment/Roll_rudder">
       <description>Roll moment due to rudder</description>
       <product>
           <property>aero/qbarUV-psf</property>
           <property>metrics/Sw-sqft</property>
           <property>metrics/bw-ft</property>
           <property>fcs/rudder-pos-rad</property>
          <table>
            <independentVar lookup="row">aero/alpha-rad</independentVar>
            <tableData>
             -0.17   1.5
              0.0    1.0
              0.37   0.0
              0.75  -0.9
              1.0	-2.0
              1.6   -0.0
            </tableData>
          </table>
           <value>0.03</value>
       </product>
    </function>

  </axis>

  <axis name="PITCH">

    <function name="aero/moment/Pitch_alpha">
       <description>Pitch moment due to alpha</description>
       <product>
           <property>aero/qbarUW-psf</property>
           <property>metrics/Sw-sqft</property>
           <property>metrics/cbarw-ft</property>
           <property>aero/function/kCLge</property>
	   <table>
            <independentVar lookup="row">aero/alpha-rad</independentVar>
            <tableData>
              -0.5    0.07
              -0.35   0.05
              -0.17   0.04
               0.0    0.0
               0.17  -0.04
               0.35  -0.07
               0.5   -0.08
               0.6   -0.065
               0.70  -0.025
               0.75   0.00
               0.82   0.02
               0.87   0.00
               1.0   -0.12
               1.7   -0.30
            </tableData>
           </table>
       </product>
    </function>

    <function name="aero/moment/Pitch_elevator">
       <description>Pitch moment due to elevator</description>
       <product>
          <property>aero/qbarUW-psf</property>
          <property>metrics/Sw-sqft</property>
          <property>metrics/cbarw-ft</property>
          <property>fcs/elevator-pos-rad</property>
          <table>
            <independentVar lookup="row">velocities/mach</independentVar>
            <tableData>
              0.0     -0.41
              0.9     -0.41
              1.1     -0.24
              2.0     -0.24
            </tableData>
          </table>
<!-- From: Aerodynamic analysis of J35 Draken Alexis RIGALDO -->
          <table>
            <independentVar lookup="row">aero/alpha-rad</independentVar>
            <tableData>
              0.0     1.0
              0.24    1.0
              0.35    0.8
              0.5     0.5
              0.7     0.2
              1.0     0.1
              1.7     0.1
            </tableData>
          </table>
       </product>
    </function>

    <function name="aero/moment/Pitch_damp">
       <description>Pitch moment due to pitch rate</description>
       <product>
           <property>aero/qbarUW-psf</property>
           <property>metrics/Sw-sqft</property>
           <property>metrics/cbarw-ft</property>
           <property>aero/ci2vel</property>
           <property>velocities/q-aero-rad_sec</property>
           <table>
            <independentVar lookup="row">aero/alpha-rad</independentVar>
            <tableData>
             -0.80   -0.6
             -0.40   -1.2
              0.40   -1.2
              0.80   -0.6
            </tableData>
          </table>
       </product>
    </function>

    <function name="aero/moment/Pitch_alphadot">
       <description>Pitch moment due to alpha rate</description>
       <product>
           <property>aero/qbarUW-psf</property>
           <property>metrics/Sw-sqft</property>
           <property>metrics/cbarw-ft</property>
           <property>aero/ci2vel</property>
           <property>aero/alphadot-rad_sec</property>
           <table>
            <independentVar lookup="row">aero/alpha-rad</independentVar>
            <tableData>
             -0.80    0.0
             -0.40   -0.5
              0.40   -0.5
              0.80    0.0
            </tableData>
          </table>
       </product>
    </function>

<!-- Pitch gear and droptanks not adjusted for alpha -->
    <function name="aero/moment/Pitch_gear">
       <description>Pitch moment due to gear</description>
       <product>
           <property>aero/qbar-psf</property>
           <property>gear/gear-pos-norm</property>
         <value>-21</value>
       </product>
    </function>

  <function name="aero/moment/Pitch_droptanks">
       <description>Pitch due to Droptanks</description>
       <product>
           <property>aero/qbar-psf</property>
           <property>/consumables/droptanks</property>
           <value>-0.84</value>
       </product>
    </function>

     <function name="aero/moment/Pitch_intake">
       <description>Pitch moment due to airflow in intake</description>
       <product>
         <property>aero/qbarUW-psf</property>
         <property>metrics/Sw-sqft</property>
         <property>metrics/cbarw-ft</property>
         <property>aero/alpha-rad</property>
         <property>aero/function/CA-1</property>
         <value>-0.05</value>
       </product>
    </function>
  </axis>

  <axis name="YAW">

    <!-- Incorrect? -->
    <function name="aero/moment/Yaw_beta">
       <description>Yaw moment due to beta</description>
       <product>
           <property>aero/qbar-psf</property>
           <property>metrics/Sw-sqft</property>
           <property>metrics/bw-ft</property>
           <table>
            <independentVar lookup="row">aero/beta-rad</independentVar>
            <independentVar lookup="column">aero/alpha-rad </independentVar>
            <tableData>
                      -0.50   -0.17    0.0    0.17   0.50   0.70
              -1.57   -0.04   -0.05   -0.06  -0.05  -0.04  -0.01
              -0.26   -0.01   -0.03   -0.04  -0.03  -0.01  -0.01
               0.00    0.00    0.00    0.00   0.00   0.00   0.00
               0.26    0.01    0.03    0.04   0.03   0.01   0.01
               1.57    0.50    0.05    0.06   0.05   0.04   0.01
            </tableData>
          </table>
       </product>
    </function>

    <function name="aero/moment/Yaw_damp">
       <description>Yaw moment due to yaw rate</description>
       <product>
         <property>aero/qbar-psf</property>
         <property>metrics/Sw-sqft</property>
         <property>metrics/bw-ft</property>
         <property>aero/bi2vel</property>
         <property>velocities/r-aero-rad_sec</property>
         <table>
           <independentVar lookup="row">aero/alpha-rad</independentVar>
             <tableData>
               -0.17   -0.20
                0.00    -0.20
                0.17    -0.20
                0.83    -0.10
                1.57    -0.05
            </tableData>
         </table>
       </product>
    </function>

    <function name="aero/moment/Yaw_rudder">
       <description>Yaw moment due to rudder</description>
       <product>
           <property>aero/qbarUV-psf</property>
           <property>metrics/Sw-sqft</property>
           <property>metrics/bw-ft</property>
           <table>
             <independentVar lookup="row">aero/beta-rad</independentVar>
             <independentVar lookup="column">fcs/rudder-pos-rad</independentVar>
             <tableData>
                       -0.35   -0.24   -0.17   -0.08   0.00   0.08   0.17   0.24   0.35
               -0.35    0.01    0.008   0.00   -0.003 -0.008 -0.015 -0.016 -0.02  -0.022
               -0.17    0.014   0.010   0.005  -0.001 -0.006 -0.012 -0.019 -0.023 -0.028
               -0.08    0.023   0.017   0.010   0.003 -0.003 -0.010 -0.017 -0.023 -0.030
                0.00    0.028   0.022   0.015   0.008  0.000 -0.008 -0.015 -0.022 -0.028
                0.08    0.030   0.023   0.017   0.010  0.003 -0.003 -0.010 -0.017 -0.023
                0.17    0.028   0.023   0.019   0.012  0.006  0.001 -0.005 -0.010 -0.014
                0.35    0.022   0.020   0.016   0.015  0.008  0.003  0.00  -0.008 -0.010
            </tableData>
         </table>
       </product>
    </function>

    <function name="aero/moment/Yaw_aileron">
       <description>Aileron gas</description>
       <product>
           <property>aero/qbar-psf</property>
           <property>metrics/Sw-sqft</property>
           <property>metrics/bw-ft</property>
           <property>fcs/left-aileron-control</property>
           <value>0.01</value>
       </product>
    </function>


  </axis>

 </aerodynamics>
