<?xml version="1.0"?>
<?xml-stylesheet type="text/xsl" href="http://jsbsim.sourceforge.net/JSBSim.xsl"?>
<fdm_config name="Draken J35F" version="2.0" release="ALPHA"
   xmlns:xsi="http://www.w3.org/2001/XMLSchema-instance"
   xsi:noNamespaceSchemaLocation="http://jsbsim.sourceforge.net/JSBSim.xsd">

 <fileheader>
  <author> Aeromatic v 0.95 </author>
  <filecreationdate>2013-01-05</filecreationdate>
  <version>$Revision: 1.15 $</version>
  <description> Models a Draken J35F. </description>
 </fileheader>

<!--
  File:     Draken J35F.xml
  Inputs:
    name:          Draken J35F
    type:          single-engine transonic/supersonic fighter
    max weight:    26260.12 lb
    wing span:     30.8414 ft
    length:        50.33054 ft
    wing area:     527.483089 sq-ft
    gear type:     tricycle
    retractable?:  yes
    # engines:     1
    engine type:   piston
    engine layout: aft fuselage
    yaw damper?    yes
  Outputs:
    wing loading:  49.59 lb/sq-ft
    payload:       5902.9 lbs
    CL-alpha:      3.5 per radian
    CL-0:          0.08
    CL-max:        1
    CD-0:          0.021
    K:             0.12

-->

 <metrics>
   <wingarea  unit="FT2">  527.48 </wingarea>
   <wingspan  unit="FT" >   30.84 </wingspan>
   <wing_incidence>        0.0733 </wing_incidence>
   <chord     unit="FT" >   17.10 </chord>
   <htailarea unit="FT2">   0.00 </htailarea><!-- 96.88 -->
   <htailarm  unit="FT" >   11.8 </htailarm>
   <vtailarea unit="FT2">   48.5 </vtailarea>
   <vtailarm  unit="FT" >   12.5 </vtailarm>
   <location name="AERORP" unit="IN">
     <x> 313.0 </x> <!-- 10000 mm from datum 2049 mm in front of nose -->
     <y>   0.00 </y>
     <z>  20.00 </z>
   </location>
   <location name="EYEPOINT" unit="IN">
     <x> 133.0 </x><!-- 130.00 -->
     <y>   0.00 </y>
     <z>  35.00 </z>
   </location>
   <location name="VRP" unit="IN">
     <x>267.0</x>
     <y>0.0</y>
     <z>0.0</z>
   </location>
 </metrics>

 <mass_balance>
   <ixx unit="SLUG*FT2">     12571 </ixx>
   <iyy unit="SLUG*FT2">     56332 </iyy>
   <izz unit="SLUG*FT2">     47820 </izz>
   <emptywt unit="LBS" >     18100 </emptywt> <!-- incl. pilot and akan -->
   <location name="CG" unit="IN">
     <x> 315.8 </x> <!-- 10072 mm from datum 2049 mm in front of nose -->
     <y>   0.00 </y>
     <z> 12.0 </z>
   </location>

   <pointmass name="DroptankL">
    <weight unit="LBS">100</weight>
    <location name="POINTMASS" unit="IN">
      <x> 304 </x>
      <y> -24.00 </y>
      <z> -22.4 </z>
    </location>
  </pointmass>

   <pointmass name="DroptankR">
    <weight unit="LBS">100</weight>
    <location name="POINTMASS" unit="IN">
      <x> 304 </x>
      <y>  24.00 </y>
      <z> -22.4 </z>
    </location>
  </pointmass>

 </mass_balance>

 <ground_reactions file="DrakenJ35F-groundreactions.xml"/>
 <propulsion file="Systems/propulsion"/>
 <system file="fuel"/>
 <system file="hydraulic"/>
 <flight_control file="Systems/flightcontrol"/>
 <aerodynamics file="DrakenJ35F-aerodynamics.xml"/>
 <external_reactions file="DrakenJ35F-externalreactions"/>

</fdm_config>
